*HEADING
FV16_cantilevered_plate_abaqus ElType=C3D8I n1=10
*PART, NAME=part1
*END PART
*ASSEMBLY, NAME=ASSEM1
*INSTANCE, NAME=INSTNC1, PART=PART1
*NODE
1,0,0,0
2,1,0,0
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*ELEMENT, TYPE =C3D8I, ELSET=All
1,1,2,13,12,122,123,134,133
2,122,123,134,133,243,244,255,254
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*ORIENTATION,NAME=Global
1,0,0,0,1,0
1,0
*ORIENTATION,NAME=Rm
1,0,0,0,1,0
1,0
*SOLID SECTION,MATERIAL=Material,ORIENTATION =Rm,ELSET=All, CONTROLS  =Hourglass
*SURFACE SECTION, ELSET=Traction
*NSET, NSET=xfix
1,
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*NSET, NSET=yfix
1,
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*NSET, NSET=zfix
1,
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*END INSTANCE
*END ASSEMBLY
*MATERIAL,NAME=Material
*ELASTIC,TYPE=ISOTROPIC
2e+11,0.3
*DENSITY
8000
*STEP
*FREQUENCY, EIGENSOLVER=LANCZOS
6, , ,-1.E6
*BOUNDARY
ASSEM1.INSTNC1.xfix,1
*BOUNDARY
ASSEM1.INSTNC1.yfix,2
*BOUNDARY
ASSEM1.INSTNC1.zfix,3
*ENERGY PRINT
*END STEP
