*HEADING
hemisphere1
******************************************************************
** Model: C:\Users\pkrysl\Documents\Autodesk simulations\hemisphere1.inp
** Created by Autodesk Algor FEA Translation Utility	Version 2013.00-WIN  28-Feb-2012
******************************************************************
**
*NODE, SYSTEM=RC
1, 9.980000E+003, 0.000000E+000, 0.000000E+000
2, 0.000000E+000, 0.000000E+000, 9.980000E+003
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*ELEMENT, TYPE=C3D10, ELSET=T101
1,2088,3934,3913,3923,23186,15744,23183,23184,15778,15776
2,2101,3914,3915,2118,23242,15681,23243,9682,23304,23305
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*SOLID SECTION, ELSET=T101, MATERIAL=M1
*MATERIAL, NAME=M1
*ELASTIC, TYPE=ISOTROPIC
6.825000E+004, 0.300000, 0.000000
*DENSITY
0.000000
*EXPANSION, TYPE=ISO
1.200000E-005
*BOUNDARY
1, 4, 6
2, 4, 6
3, 4, 6
4, 4, 6
5, 4, 6
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23420, 4, 6
*STEP
*STATIC
*CLOAD
1, 1, -666.7
3, 2, 666.7
5, 2, 666.7
6, 1, -666.7
9796, 2, 666.7
10106, 1, -666.7
*END STEP
